<?xml version="1.0"?>
<Node name="DomeRingRoot" gravity="0 -9.81 0" dt=".02">
	<MeshObjLoader name="dome_ring_loader"  filename="../../../../ros/srs_traj_opt/patient_description/meshes/dome/dome_ring.obj"  scale="1"/>
	<Node name="DomeRing"  gravity="0 -9.81 0">
		<EulerImplicitSolver name="domeRing_cg_odesolver" printLog="false" />
		<CGLinearSolver iterations="25" name="linear solver_dome_ring" tolerance="1.0e-9" threshold="1.0e-9" />
		<MeshVTKLoader name="vtkDomeRingLoader" filename="../../../../ros/srs_traj_opt/patient_description/meshes/dome/dome_ring.vtu" />
		<TetrahedronSetTopologyContainer name="TetraTopologyContainer_dome_ring" src="@vtkDomeRingLoader" />
		<MechanicalObject name="domeRing_dofs" src="@vtkDomeRingLoader" template="Vec3d" />
		<TetrahedronSetGeometryAlgorithms template="Vec3d" name="domeRing_TetraGeomAlgo"  drawTetrahedra="1"/>
		<!-- defines more specific algorithms (e.g. subDivideTetrahedronsWithPlane(), InciseAlongEdge() -->
		<TetrahedronSetTopologyAlgorithms template="Vec3d" name="domeRing_TetraTopologyAlgo" />
		<!-- defines all the basic operations (add or remove tetrahedra) and their process -->
		<TetrahedronSetTopologyModifier name="domeRing_TetraTopologyModifier" />
		<DiagonalMass  name="computed using mass domeRing_density" massDensity="1" />
		<TetrahedronMooneyRivlinFEMForceField  template="Vec3d" ParameterSet="1000 100"
			 	materialName="MooneyRivlinIncompressible"  youngModulus="10000" poissonRatio="0.45" />
		<Node name="DomeRingVisu" tags="Visual" gravity="0 -9.81 0">
	    <OglModel name="DomeRingVisual"  src="@../../dome_ring_loader" translation="0 0 0"
				rotation="0 0 0" dx="0" dy="0" dz="0" rx="0" ry="0" rz="0" color="0.8549 0.8235 0.6431"
				scale="1"/>
		  <BarycentricMapping name="visual mapping" input="@../domeRing_dofs" output="@DomeRingVisual" />
		</Node>
  </Node>
	<Node 	 name="DomeRingCollis"  gravity="0 -9.81 0" >
	  <MeshObjLoader name="domeRingCollisLoader"  filename="../../../../ros/srs_traj_opt/patient_description/meshes/dome/dome_ring.obj"  scale="1"/>
	  <MechanicalObject template="Vec3d" name="dome-ringcollis-states"  src="@domeRingCollisLoader"
				velocity="0 0 0"  force="0 0 0" translation="0 0 0"
				rotation="0 0 0" dx="0" dy="0" dz="0" rx="0" ry="0" rz="0" scale="1" externalForce="0 0 0" />
	</Node>
</Node>
