<?xml version="1.0"?>
<Node name="SphereNode">
<APIVersion level="19.06" />
<RequiredPlugin name="SofaOpenglVisual"/>
<RequiredPlugin pluginName="CImgPlugin"/>
<RequiredPlugin name="IAB" pluginName="IAB"/>
<RequiredPlugin name="IABTetra" pluginName="IAB_Tetra"/>
<EulerImplicitSolver rayleighStiffness="0.01"  rayleighMass="0.1" />
<CGLinearSolver template="GraphScattered" iterations="100" tolerance="1e-5"  threshold="1e-5"  />
<!--  Presumably handles Lagrange Constraint multipliers https://www.sofa-framework.org/community/doc/using-sofa/components/animationloop/multistepanimationloop/-->
<DefaultAnimationLoop />
	<include href="dome_head.scn"
					dx="0" dy="0" dz="0" translation="0 0 0" rotation="0 0 0" color="grey" scale="1"/>
	<include href="dome_ring.scn"
					dx="0" dy="0" dz="0" translation="0 0 0" rotation="0 0 0" color="black" scale="1"/>
	<include href="dome_cover.scn"
					dx="0" dy="0" dz="0" translation="0 0 0" rotation="0 0 0" color="brown" scale="1"/>
</Node>
